# 3D copper block simulation
boundary     p p p
units        metal
atom_style   atomic

# geometry
read_data	 dataMetalUnitsGraphene4AtNv1256xNv2256.pos

mass		*   12.0107

# EAM potential
pair_style   tersoff
pair_coeff   * * SiC.tersoff C
neighbor     2. nsq
neigh_modify every 1 delay 0 check yes

#Langevin random seed
variable     dt equal 1e-5
variable     r  equal 57085
variable     T  equal 300
variable     dT equal "v_dt * 10000"

timestep ${dt}

# initialize
velocity     all create $T 28459 rot yes dist gaussian mom yes
reset_timestep 0

# fixes
fix          1 all nve
fix          2 all langevin $T $T ${dT} 73504 zero yes
fix          3 all external pf/callback 1 1
# output
#                    1    2    3  4  5     6   7
thermo_style custom step temp pe ke press pxx pyy
thermo       10
dump   1 all xyz 10 dump.graphene.xyz

# execution
#run 	 100000
#write_restart Restart.final
